C182RG
0.0
0     0     0.0
172.93968/     4.87384    36.00000
  0.00000     0.00000     0.00000
 0.00
SURFACE
Main Wing
13        1.0
INDEX
5330
YDUPLICATE
0.0
SCALE
0.3048  0.3048  0.3048
TRANSLATE
0.0  0.0  0.0
ANGLE
   0.000
SECTION
   0.0000    2.05    0.0000    5.2760   0.000   19    3
CONTROL
flap 		1.0 	0.75 0. 0. 0.  1
NACA 0.0 1.0
2412
SECTION
   0.0000    8.4300    0.0000    5.2760   0.000    3    1
CONTROL
aileron 		1.0 	0.8 0. 0. 0.  -1
NACA 0.0 1.0
2412
SECTION
   0.5000   18.0000    0.0000    3.5000   0.000    3    1
NACA 0.0 1.0
2412
CONTROL
aileron 		1.0 	0.8 0. 0. 0.  -1
SURFACE
HStab
7        1.0
INDEX
5332
YDUPLICATE
0.0
SCALE
0.3048  0.3048  0.3048
TRANSLATE
0.0  0.0  0.0
ANGLE
   0.000
SECTION
  15.0000    0.0000   -1.8000    3.0000   0.000    4    1
NACA 0.0 1.0
0012
CONTROL
elevator 		1.0 	0.8 0. 0. 0.  1
SECTION
  15.0000    0.6770   -1.8000    3.9500   0.000    3    1
NACA 0.0 1.0
0012
CONTROL
elevator 		1.0 	0.8 0. 0. 0.  1
SECTION
  15.5000    5.8330   -1.8000    2.2500   0.000    3    1
NACA 0.0 1.0
0012
CONTROL
elevator 		1.0 	0.8 0. 0. 0.  1
SURFACE
Fin
7        1.0
INDEX
5333
SCALE
0.3048  0.3048  0.3048
TRANSLATE
0.0  0.0  0.0
ANGLE
   0.000
SECTION
  19.0700   -0.0000    3.4000    2.2500   0.000    3    1
NACA 0.0 1.0
0012
CONTROL
rudder 		1.0 	0.8 0. 0. 0.  1
SECTION
  15.6100   -0.0000   -0.3500    4.0000   0.000    7    0
NACA 0.0 1.0
0012
CONTROL
rudder 		1.0 	0.8 0. 0. 0.  1
SECTION
   9.5000    0.0000   -1.5000    9.5000   0.000    7    0
NACA 0.0 1.0
0012
CONTROL
rudder 		1.0 	0.8 0. 0. 0.  1
